# Задача 1
Xa := -2
Ya := -4
Xb := -3
Yb := 0
Xlw := 100
Xc := 0
Yc := 4
Xhw := 400
Xd := 3
Yd := 0
Ylw := 200
Xe := 2
Ye := -4
Yhw := 500
Xf := -2
Yf := 0
Xg := 2
Yg := 0
Zx := transpose([Xa, Xb, Xc, Xd, Xe, Xf, Xg])
Zy := transpose([Ya, Yb, Yc, Yd, Ye, Yf, Yg])
Xl := min(Zx) = -3
Xh := max(Zx) = 3
Yh := max(Zy) = 4
Yl := min(Zy) = -4
ΔXw := Xhw - Xlw = 300
ΔX := Xh - Xl = 6
ΔYw := Yhw - Ylw = 300
ΔY := Yh - Yl = 8
Kx := ΔXw/ΔX = 50
Ky := ΔYw/ΔY = 37.5
# Матрица пересчетов
Tsw := [Kx, 0, Xlw - Kx*Xl; 0, -Ky, Yhw + Ky*Yl; 0, 0, 1] = [50, 0, 250; 0, -37.5, 350; 0, 0, 1]
[Xaw; Yaw; q] := Tsw*[Xa; Ya; 1] = [150; 500; 1]
[Xbw; Ybw; q] := Tsw*[Xb; Yb; 1] = [100; 350; 1]
[Xcw; Ycw; q] := Tsw*[Xc; Yc; 1] = [250; 200; 1]
[Xdw; Ydw; q] := Tsw*[Xd; Yd; 1] = [400; 350; 1]
[Xew; Yew; q] := Tsw*[Xe; Ye; 1] = [350; 500; 1]
[Xfw; Yfw; q] := Tsw*[Xf; Yf; 1] = [150; 350; 1]
[Xgw; Ygw; q] := Tsw*[Xg; Yg; 1] = [350; 350; 1]
Y := transpose([Yg, Yb, Yc, Yd, Yg, Ye, Ya, Yf])
Yw := transpose([Ygw, Ybw, Ycw, Ydw, Ygw, Yew, Yaw, Yfw])
X := transpose([Xg, Xb, Xc, Xd, Xg, Xe, Xa, Xf])
Xw := transpose([Xgw, Xbw, Xcw, Xdw, Xgw, Xew, Xaw, Xfw])
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# Задача 2
f(x) := sin(π*x)*sqrt(|x|)
x1 := -6
x2 := 6
Δx := 0.1
Xlw := 100
Xhw := 800
Ylw := 200
Yhw := 900
N := round((x2 - x1)/Δx) = 120
i := 0, 1 .. N
X[i] := x1 + i*Δx
Y[i] := f(X[i])
Z[i] := 1
Xl := min(X) = -6
Yh := max(Y) = 2.34521
Xh := max(X) = 6
Yl := min(Y) = -2.34521
Ms := stack(transpose(X), transpose(Y), transpose(Z))
Δxw := Xhw - Xlw = 700
Δx := Xh - Xl = 12
Δyw := Yhw - Ylw = 700
Δy := Yh - Yl = 4.69042
kx := Δxw/Δx = 58.3333
ky := Δyw/Δy = 149.241
Tsw := [kx, 0, Xlw - kx*Xl; 0, -ky, Yhw + ky*Yl; 0, 0, 1] = [58.3333, 0, 450; 0, -149.241, 550; 0, 0, 1]
Mw := Tsw*Ms
Xw := transpose(Mw)[:, 0]
Yw := transpose(Mw)[:, 1]
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